<?xml version="1.0"?>
<?xml-stylesheet type="text/xsl" href="http://jsbsim.sourceforge.net/JSBSim.xsl"?>
<fdm_config name="F-105D" version="2.0" release="ALPHA"
   xmlns:xsi="http://www.w3.org/2001/XMLSchema-instance"
   xsi:noNamespaceSchemaLocation="http://jsbsim.sourceforge.net/JSBSim.xsd">

 <fileheader>
  <author> Aeromatic v 0.9 </author>
  <filecreationdate> 03/2007 </filecreationdate>
  <version> 0.1 </version>
  <description> Models a Republic F-105D. </description>
 </fileheader>

<!--
  File:     F-105D.xml
  Inputs:
    name:          F-105D
    type:          single-engine transonic/supersonic fighter
    max weight:    52550.0 lb
    wing span:     35.0 ft
    length:        64.4 ft
    wing area:     385 sq-ft
    gear type:     tricycle
    retractable?:  yes
    # engines:     1
    engine type:   turbine
    engine layout: aft fuselage
    yaw damper?    yes
  Outputs:
    wing loading:  136.49 lb/sq-ft
    CL-alpha:      3.5 per radian
    CL-0:          0.08
    CL-max:        1
    CD-0:          0.021
    K:             0.09

-->

 <metrics>
   <wingarea  unit="FT2">  385.00 </wingarea>
   <wingspan  unit="FT" >   35.00 </wingspan>
   <wing_incidence>          2.50 </wing_incidence>
   <chord     unit="FT" >   11.00 </chord>
   <htailarea unit="FT2">   77.00 </htailarea>
   <htailarm  unit="FT" >   25.76 </htailarm>
   <vtailarea unit="FT2">   46.20 </vtailarea>
   <vtailarm  unit="FT" >   25.76 </vtailarm>
   <location name="AERORP" unit="IN">
     <x> 463.00 </x>
     <y>   0.00 </y>
     <z>   0.00 </z>
   </location>
   <location name="EYEPOINT" unit="IN">
     <x> 154.56 </x>
     <y>   0.00 </y>
     <z>  36.00 </z>
   </location>
   <location name="VRP" unit="IN">
     <x>464</x>
     <y>0</y>
     <z>0</z>
   </location>
 </metrics>

 <mass_balance>
   <ixx unit="SLUG*FT2">     21861 </ixx>
   <iyy unit="SLUG*FT2">    124370 </iyy>
   <izz unit="SLUG*FT2">     96748 </izz>
   <ixy unit="SLUG*FT2">         0 </ixy>
   <ixz unit="SLUG*FT2">         0 </ixz>
   <iyz unit="SLUG*FT2">         0 </iyz>
   <emptywt unit="LBS" >     28500 </emptywt>
   <!-- the above weight is actually the ZFW with crew, ammo, -->
   <location name="CG" unit="IN">
     <x> 464.00 </x>
     <y>   0.00 </y>
     <z>   0.00 </z>
   </location>
   <pointmass name="station1 - unused">
     <weight>0</weight>
     <location>
       <x> 490.00 </x>
       <y>-150.00 </y>
       <z> -10.00 </z>
     </location>
   </pointmass>
   <pointmass name="station2 - empty tank">
     <weight>180.0</weight>
     <location>
       <x> 470.00 </x>
       <y>-112.00 </y>
       <z> -10.00 </z>
     </location>
   </pointmass>
   <pointmass name="station3-centerline - bombs">
     <weight>5000.0</weight>
     <location>
       <x> 464.00 </x>
       <y>   0.00 </y>
       <z>   0.00 </z>
     </location>
   </pointmass>
   <pointmass name="station4 - empty tank">
     <weight>180.0</weight>
     <location>
       <x> 470.00 </x>
       <y> 112.00 </y>
       <z> -10.00 </z>
     </location>
   </pointmass>
   <pointmass name="station5 - unused">
     <weight>0.0</weight>
     <location>
       <x> 490.00 </x>
       <y> 150.00 </y>
       <z> -10.00 </z>
     </location>
   </pointmass>
 </mass_balance>

 <ground_reactions>

  <contact type="BOGEY" name="NOSE">
   <location unit="IN">
     <x>  210.00 </x>
     <y>    0.00 </y>
     <z>  -97.00 </z>
   </location>
   <static_friction>  0.80 </static_friction>
   <dynamic_friction> 0.50 </dynamic_friction>
   <rolling_friction> 0.026 </rolling_friction>
   <spring_coeff unit="LBS/FT">     13000.00 </spring_coeff>
   <damping_coeff unit="LBS/FT/SEC"> 8000.00 </damping_coeff>
   <max_steer unit="DEG"> 60.00 </max_steer>
   <brake_group>NONE</brake_group>
   <retractable>1</retractable>
 </contact>

  <contact type="BOGEY" name="LEFT_MAIN">
   <location unit="IN">
     <x>  480.00 </x>
     <y> -104.00 </y>
     <z>  -88.00 </z>
   </location>
   <static_friction>  0.80 </static_friction>
   <dynamic_friction> 0.50 </dynamic_friction>
   <rolling_friction> 0.026 </rolling_friction>
   <spring_coeff unit="LBS/FT">      40000.00 </spring_coeff>
   <damping_coeff unit="LBS/FT/SEC"> 15000.00 </damping_coeff>
   <brake_group>LEFT</brake_group>
   <retractable>1</retractable>
 </contact>

  <contact type="BOGEY" name="RIGHT_MAIN">
   <location unit="IN">
     <x>  480.00 </x>
     <y>  104.00 </y>
     <z>  -88.00 </z>
   </location>
   <static_friction>  0.80 </static_friction>
   <dynamic_friction> 0.50 </dynamic_friction>
   <rolling_friction> 0.026 </rolling_friction>
   <spring_coeff unit="LBS/FT">      40000.00 </spring_coeff>
   <damping_coeff unit="LBS/FT/SEC"> 15000.00 </damping_coeff>
   <brake_group>RIGHT</brake_group>
   <retractable>1</retractable>
 </contact>

  <contact type="STRUCTURE" name="LEFT_WING">
    <location unit="IN">
     <x>  500.00 </x>
     <y> -204.00 </y>
     <z> 0 </z>
    </location>
    <static_friction>  0.80 </static_friction>
    <dynamic_friction> 0.50 </dynamic_friction>
    <spring_coeff unit="LBS/FT">       8000.00 </spring_coeff>
    <damping_coeff unit="LBS/FT/SEC"> 20000.00 </damping_coeff>
 </contact>

  <contact type="STRUCTURE" name="RIGHT_WING">
    <location unit="IN">
     <x> 500.00 </x>
     <y> 204.00 </y>
     <z> 0 </z>
    </location>
    <static_friction>  0.80 </static_friction>
    <dynamic_friction> 0.50 </dynamic_friction>
    <spring_coeff unit="LBS/FT">       8000.00 </spring_coeff>
    <damping_coeff unit="LBS/FT/SEC"> 20000.00 </damping_coeff>
 </contact>

  <contact type="STRUCTURE" name="NOSE">
    <location unit="IN">
     <x>  30 </x>
     <y>   0 </y>
     <z> -30 </z>
    </location>
    <static_friction>  0.80 </static_friction>
    <dynamic_friction> 0.50 </dynamic_friction>
    <spring_coeff unit="LBS/FT">       8000.00 </spring_coeff>
    <damping_coeff unit="LBS/FT/SEC"> 20000.00 </damping_coeff>
 </contact>

  <contact type="STRUCTURE" name="AFT_FUSELAGE">
    <location unit="IN">
     <x> 600 </x>
     <y>   0 </y>
     <z> -20 </z>
    </location>
    <static_friction>  0.80 </static_friction>
    <dynamic_friction> 0.50 </dynamic_friction>
    <spring_coeff unit="LBS/FT">       8000.00 </spring_coeff>
    <damping_coeff unit="LBS/FT/SEC"> 20000.00 </damping_coeff>
 </contact>

 </ground_reactions>

 <propulsion>

   <engine file="J75">
    <location unit="IN">
      <x> 710.00 </x>
      <y>   0.00 </y>
      <z>   0.00 </z>
    </location>
    <feed>0</feed>
    <feed>1</feed>
    <feed>2</feed>
    <feed>3</feed>
    <thruster file="direct">
     <location unit="IN">
       <x> 780.00 </x>
       <y>   0.00 </y>
       <z>   0.00 </z>
     </location>
     <orient unit="DEG">
       <pitch> 0.00 </pitch>
       <roll>  0.00 </roll>
       <yaw>   0.00 </yaw>
     </orient>
    </thruster>
  </engine>

  <tank type="FUEL" number="0"><!-- Normal Internal(1160gal) -->
     <location unit="IN">
       <x> 464.00 </x>
       <y>   0.00 </y>
       <z>  -6.00 </z>
     </location>
     <priority>2</priority>
     <density unit="LBS/GAL"> 6.48 </density>
     <capacity unit="LBS"> 13740 </capacity>
     <contents unit="LBS"> 13500 </contents>
  </tank>

  <tank type="FUEL" number="1"><!-- left wing tank (450gal) station 2-->
     <location unit="IN">
       <x> 470.00 </x>
       <y>-119.00 </y>
       <z> -19.00 </z>
     </location>
     <density unit="LBS/GAL"> 6.48 </density>
     <capacity unit="LBS"> 6870 </capacity>
     <contents unit="LBS">    0 </contents>
  </tank>

  <tank type="FUEL" number="2"><!-- right wing tank (450gal) station 4-->
     <location unit="IN">
       <x> 470.00 </x>
       <y> 119.00 </y>
       <z> -19.00 </z>
     </location>
     <density unit="LBS/GAL"> 6.48 </density>
     <capacity unit="LBS"> 6870 </capacity>
     <contents unit="LBS">    0 </contents>
  </tank>

  <tank type="FUEL" number="3"><!-- Aux Tank in Weapons Bay(390gal) -->
     <location unit="IN">
       <x> 464.00 </x>
       <y>   0.00 </y>
       <z> -24.00 </z>
     </location>
     <priority>2</priority>
     <density unit="LBS/GAL"> 6.48 </density>
     <capacity unit="LBS"> 2600 </capacity>
     <contents unit="LBS">    0 </contents>
  </tank>

 </propulsion>

 <system file="hook"/>
 <system file="refuel"/>
 <system file="gear"/>
 <system file="flaps"/>
 <system file="speedbrakes"/>
 <system file="FCS-pitch"/>
 <system file="FCS-roll"/>
 <system file="FCS-yaw"/>
 <system file="NWS"/>
 <system file="alpha_buffet"/>
 <system file="dump"/>
 <system file="chute"/>
 <system file="armament"/>
 <system file="crash-detect"/>
 <system file="beacon"/>
 <system file="beacon2"/>
 <system file="water_injection"/>
 <system file="particles"/>
 <system file="canopy"/>
 <system file="ab_workaround"/>

 <flight_control name="FCS: F-105D">
 </flight_control>

 <aerodynamics>

        <function name="aero/function/kCDge">
            <description>Change_in_drag_due_to_ground_effect</description>
            <product>
                  <table>
                      <independentVar>aero/h_b-mac-ft</independentVar>
                      <tableData>
                          0.0000	0.4800
                          0.1000	0.5150
                          0.1500	0.6290
                          0.2000	0.7090
                          0.3000	0.8150
                          0.4000	0.8820
                          0.5000	0.9280
                          0.6000	0.9620
                          0.7000	0.9880
                          0.8000	1.0000
                      </tableData>
                  </table>
            </product>
        </function>

        <function name="aero/function/kCLge">
            <description>Change_in_lift_due_to_ground_effect</description>
            <product>
                  <table>
                      <independentVar>aero/h_b-mac-ft</independentVar>
                      <tableData>
                          0.0000	1.2030
                          0.1000	1.1270
                          0.1500	1.0900
                          0.2000	1.0730
                          0.3000	1.0460
                          0.4000	1.0550
                          0.5000	1.0190
                          0.6000	1.0130
                          0.7000	1.0080
                          0.8000	1.0060
                          0.9000	1.0030
                          1.0000	1.0020
                          1.1000	1.0000
                      </tableData>
                  </table>
            </product>
        </function>

  <axis name="LIFT">

    <function name="aero/coefficient/CLalpha">
      <description>Lift_due_to_alpha</description>
      <product>
          <property>aero/qbar-psf</property>
          <property>metrics/Sw-sqft</property>
          <property>aero/function/kCLge</property>
          <table>
            <independentVar lookup="row">aero/alpha-rad</independentVar>
            <independentVar lookup="column">fcs/flap-pos-norm</independentVar>
            <tableData>
                     0       0.5      1.0
              -0.20 -0.620  -0.620   -0.620
               0.00  0.040   0.040    0.040
               0.26  0.910   0.950    0.950
               0.36  0.752   0.900    0.752
               0.60  0.448   0.596    0.448
               1.00  0.100   0.238    0.100
            </tableData>
          </table>
      </product>
    </function>

    <function name="aero/coefficient/dCLflap">
       <description>Delta_Lift_due_to_flaps</description>
       <product>
           <property>aero/qbar-psf</property>
           <property>metrics/Sw-sqft</property>
           <table>
            <independentVar lookup="row">fcs/flap-pos-norm</independentVar>
            <tableData>
               0     0
               0.5   0
               1.0   0.36
            </tableData>
           </table>
       </product>
    </function>

    <function name="aero/coefficient/CLde">
       <description>Lift_due_to_Elevator_Deflection</description>
       <product>
           <property>aero/qbar-psf</property>
           <property>metrics/Sw-sqft</property>
           <property>fcs/elevator-pos-rad</property>
           <value>0.2</value>
       </product>
    </function>

    <function name="aero/coefficient/buffet">
       <description>Buffet at high alpha</description>
         <product>
           <property>aero/alpha_buffet/sine_wave</property>
           <property>aero/alpha_buffet/strength</property>
         </product>
    </function>

  </axis>

  <axis name="DRAG">

    <function name="aero/coefficient/CD0">
       <description>Drag_at_zero_lift</description>
       <product>
          <property>aero/qbar-psf</property>
          <property>metrics/Sw-sqft</property>
          <table>
            <independentVar lookup="row">aero/alpha-rad</independentVar>
            <tableData>
             -1.57    1.500
             -0.28    0.2
             -0.24    0.025
              0.00    0.019
              0.24    0.025
              0.28    0.2
              1.57    1.500
            </tableData>
          </table>
       </product>
    </function>

    <function name="aero/coefficient/CDi">
       <description>Induced_drag</description>
         <product>
           <property>aero/qbar-psf</property>
           <property>metrics/Sw-sqft</property>
           <property>aero/cl-squared</property>
           <property>aero/function/kCDge</property>
           <value>0.13</value>
         </product>
    </function>

    <function name="aero/coefficient/CDmach">
       <description>Drag_due_to_mach</description>
        <product>
          <property>aero/qbar-psf</property>
          <property>metrics/Sw-sqft</property>
          <table>
            <independentVar lookup="row">velocities/mach</independentVar>
            <tableData>
                0.00      0.000
                0.83      0.000
                1.10      0.019
                1.40      0.009
                2.00      0.005
            </tableData>
          </table>
        </product>
    </function>

    <function name="aero/coefficient/CDbc">
       <description>Drag_due_to_braking_chute</description>
         <product>
           <property>aero/qbar-psf</property>
           <property>metrics/Sw-sqft</property>
           <property>systems/chute/unfurl-norm</property>
           <value>1.0</value>
         </product>
    </function>

    <function name="aero/coefficient/CDflap">
       <description>Drag_due_to_flaps</description>
         <product>
           <property>aero/qbar-psf</property>
           <property>metrics/Sw-sqft</property>
           <table>
            <independentVar lookup="row">fcs/flap-pos-norm</independentVar>
            <independentVar lookup="column">velocities/mach</independentVar>
            <tableData>
                     0        0.95     1.0
               0     0        0        0
               0.5   0.002    0.002    0.2
               1.0   0.07     0.2      0.2
            </tableData>
           </table>
         </product>
    </function>

    <function name="aero/coefficient/CDgear">
       <description>Drag_due_to_gear</description>
         <product>
           <property>aero/qbar-psf</property>
           <property>metrics/Sw-sqft</property>
           <property>gear/gear-pos-norm</property>
           <value>0.037</value>
         </product>
    </function>

    <function name="aero/coefficient/CDsbV">
       <description>Drag_due_to_vertical_speedbrakes</description>
         <product>
           <property>aero/qbar-psf</property>
           <property>metrics/Sw-sqft</property>
           <property>fcs/vertical-speedbrake-pos-norm</property>
           <value>0.02</value>
         </product>
    </function>

    <function name="aero/coefficient/CDsbH">
       <description>Drag_due_to_horizontal_speedbrakes</description>
         <product>
           <property>aero/qbar-psf</property>
           <property>metrics/Sw-sqft</property>
           <property>fcs/horizontal-speedbrake-pos-norm</property>
           <value>0.02</value>
         </product>
    </function>

    <function name="aero/coefficient/CDbeta">
       <description>Drag_due_to_sideslip</description>
       <product>
          <property>aero/qbar-psf</property>
          <property>metrics/Sw-sqft</property>
          <table>
            <independentVar lookup="row">aero/beta-rad</independentVar>
            <tableData>
              -1.40    1.230
              -0.26    0.050
               0.00    0.000
               0.26    0.050
               1.40    1.230
            </tableData>
          </table>
       </product>
    </function>

    <function name="aero/coefficient/CDde">
       <description>Drag_due_to_Elevator_Deflection</description>
       <product>
           <property>aero/qbar-psf</property>
           <property>metrics/Sw-sqft</property>
           <abs><property>fcs/elevator-pos-norm</property></abs>
           <value>0.04</value>
       </product>
    </function>

  </axis>

  <axis name="SIDE">

    <function name="aero/coefficient/CYb">
       <description>Side_force_due_to_beta</description>
       <product>
           <property>aero/qbar-psf</property>
           <property>metrics/Sw-sqft</property>
           <property>aero/beta-rad</property>
           <value>-1</value>
       </product>
    </function>

  </axis>

  <axis name="ROLL">

    <function name="aero/coefficient/Clb">
       <description>Roll_moment_due_to_beta</description>
       <product>
           <property>aero/qbar-psf</property>
           <property>metrics/Sw-sqft</property>
           <property>metrics/bw-ft</property>
           <property>aero/beta-rad</property>
           <value>-0.1</value>
       </product>
    </function>

    <function name="aero/coefficient/Clp">
       <description>Roll_moment_due_to_roll_rate</description>
       <product>
           <property>aero/qbar-psf</property>
           <property>metrics/Sw-sqft</property>
           <property>metrics/bw-ft</property>
           <property>aero/bi2vel</property>
           <property>velocities/p-aero-rad_sec</property>
           <value>-0.4</value>
       </product>
    </function>

    <function name="aero/coefficient/Clr">
       <description>Roll_moment_due_to_yaw_rate</description>
       <product>
           <property>aero/qbar-psf</property>
           <property>metrics/Sw-sqft</property>
           <property>metrics/bw-ft</property>
           <property>aero/bi2vel</property>
           <property>velocities/r-aero-rad_sec</property>
           <value>0.12</value>
       </product>
    </function>

    <function name="aero/coefficient/Clda">
       <description>Roll_moment_due_to_aileron</description>
       <product>
          <property>aero/qbar-psf</property>
          <property>metrics/Sw-sqft</property>
          <property>metrics/bw-ft</property>
          <property>fcs/left-aileron-pos-rad</property>
          <table>
            <independentVar lookup="row">velocities/mach</independentVar>
            <tableData>
              0.0    0.100
              2.0    0.037
            </tableData>
          </table>
       </product>
    </function>

    <function name="aero/coefficient/Cldr">
       <description>Roll_moment_due_to_rudder</description>
       <product>
           <property>aero/qbar-psf</property>
           <property>metrics/Sw-sqft</property>
           <property>metrics/bw-ft</property>
           <property>fcs/rudder-pos-rad</property>
           <value>0.005</value>
       </product>
    </function>

  </axis>

  <axis name="PITCH">

    <function name="aero/coefficient/Cmalpha">
       <description>Pitch_moment_due_to_alpha</description>
       <product>
           <property>aero/qbar-psf</property>
           <property>metrics/Sw-sqft</property>
           <property>metrics/cbarw-ft</property>
           <property>aero/alpha-rad</property>
           <value>-0.3</value>
       </product>
    </function>

    <function name="aero/coefficient/Cmde">
       <description>Pitch_moment_due_to_elevator</description>
       <product>
          <property>aero/qbar-psf</property>
          <property>metrics/Sw-sqft</property>
          <property>metrics/cbarw-ft</property>
          <property>fcs/elevator-pos-rad</property>
          <table>
            <independentVar lookup="row">velocities/mach</independentVar>
            <tableData>
              0.0     -0.800
              2.0     -0.200
            </tableData>
          </table>
       </product>
    </function>

    <function name="aero/coefficient/Cmq">
       <description>Pitch_moment_due_to_pitch_rate</description>
       <product>
           <property>aero/qbar-psf</property>
           <property>metrics/Sw-sqft</property>
           <property>metrics/cbarw-ft</property>
           <property>aero/ci2vel</property>
           <property>velocities/q-aero-rad_sec</property>
           <value>-18</value>
       </product>
    </function>

    <function name="aero/coefficient/Cmadot">
       <description>Pitch_moment_due_to_alpha_rate</description>
       <product>
           <property>aero/qbar-psf</property>
           <property>metrics/Sw-sqft</property>
           <property>metrics/cbarw-ft</property>
           <property>aero/ci2vel</property>
           <property>aero/alphadot-rad_sec</property>
           <value>-9</value>
       </product>
    </function>

  </axis>

  <axis name="YAW">

    <function name="aero/coefficient/Cnb">
       <description>Yaw_moment_due_to_beta</description>
       <product>
           <property>aero/qbar-psf</property>
           <property>metrics/Sw-sqft</property>
           <property>metrics/bw-ft</property>
           <property>aero/beta-rad</property>
           <value>0.12</value>
       </product>
    </function>

    <function name="aero/coefficient/Cnr">
       <description>Yaw_moment_due_to_yaw_rate</description>
       <product>
           <property>aero/qbar-psf</property>
           <property>metrics/Sw-sqft</property>
           <property>metrics/bw-ft</property>
           <property>aero/bi2vel</property>
           <property>velocities/r-aero-rad_sec</property>
           <value>-0.15</value>
       </product>
    </function>

    <function name="aero/coefficient/Cndr">
       <description>Yaw_moment_due_to_rudder</description>
       <product>
           <property>aero/qbar-psf</property>
           <property>metrics/Sw-sqft</property>
           <property>metrics/bw-ft</property>
           <property>fcs/rudder-pos-rad</property>
           <value>-0.015</value>
       </product>
    </function>

  </axis>

 </aerodynamics>

 <external_reactions>

  <force name="hook" frame="BODY">
   <location unit="IN">
     <x>  658.0 </x>
     <y>    0.0 </y>
     <z>  -37.0 </z>
   </location>
   <direction>
     <x>  -0.9995 </x>
     <y>   0.0    </y>
     <z>   0.01 </z>
   </direction>
  </force>

 </external_reactions>


</fdm_config>
